# Константа связи
α := 0.7
# Трансфер-матрица
M(k, Φ) := e^(-1i*π*(k + Φ))/(2*k*(-1 + e^(2*1i*π*k))*(1 + e^(2*1i*π*Φ)))*[
    -(2*k*e^(2*1i*π*k) + 2*k*e^(2*1i*π*(k + 2*Φ)) - 1i*α*e^(2*1i*π*(k + Φ)) + (-4*k + 1i*α)*e^(2*1i*π*(2*k + Φ))), -2*k*(-1 + e^(2*1i*π*Φ))*(-1 + e^(2*1i*π*(k + Φ))) - 1i*α*e^(2*1i*π*Φ)*(-1 + e^(2*1i*π*k));
    2*k*e^(4*1i*π*k) + 2*k*e^(2*1i*π*(k + 2*Φ)) + (-2*k + 1i*α)*e^(2*1i*π*(2*k + Φ)) - (2*k + 1i*α)*e^(2*1i*π*(k + Φ)), 2*k*e^(2*1i*π*k) + 2*k*e^(2*1i*π*(k + 2*Φ)) + 1i*α*e^(2*1i*π*(k + Φ)) - (4*k + 1i*α)*e^(2*1i*π*Φ)
]
M(k, 0) → [
    -e^(-π*k*1i)*(4*k*e^(2i*π*k) - 0.7i*e^(6.28318530718i*k) - e^(4i*π*k)*(4*k - 0.7i))/(4*k*(e^(2i*π*k) - 1)), e^(-π*k*1i)*(0.7i - 0.7i*e^(6.28318530718i*k))/(4*k*(e^(2i*π*k) - 1));
    -e^(-π*k*1i)*(-2*k*e^(2i*π*k) - 2*k*e^(4i*π*k) + e^(2i*π*k)*(2*k + 0.7i) + e^(4i*π*k)*(2*k - 0.7i))/(4*k*(e^(2i*π*k) - 1)), e^(-π*k*1i)*(0.7i*e^(6.28318530718i*k) - 4*k + 4*k*e^(6.28318530718i*k) - 0.7i)/(4*k*(e^(2i*π*k) - 1))
]
f(k, Φ) := |1 - |M(k, Φ)||
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# Видно, что при полуцелых значения магнитного потока Φ определитель трансфер-матрицы устремляется в бесконечность, в то время как при остальных значениях он равен единице
eig1(k, Φ) := eigenvals(M(k, Φ))[0]
eig2(k, Φ) := eigenvals(M(k, Φ))[1]
t := 0, 0.001 .. 2
# Поведение собственного числа №1 | Поведение собственного числа №2
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# Отклонение модулей собственных чисел от единицы
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t := 0.5, 0.5 + 0.001 .. 0.9
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# Модуль следа трансфер-матрицы. Значения k, для которых он попадает в интервал от 0 до 2 включительно, принадлежат непрерывному спектру.
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# Проверяем правильность выражения для следа
traceM(k, Φ) := e^(1i*π*(-k + Φ))*(4*k + 1i*α + (4*k - 1i*α)*e^(2*1i*π*k))/(2*k*(1 + e^(2*1i*π*Φ)))
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## Проверка упрощенных выражений для элементов трансфер-матрицы в магнитном поле
m11(k, Φ) := M(k, Φ)[:, 0][0]
mm11(k, Φ) := e^(1i*π*k)/cos(π*Φ)*(1 + α/(4*1i*k) + (1 - cos(2*π*Φ))/(e^(1i*2*π*k) - 1))
Φ := 0.1
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m12(k, Φ) := M(k, Φ)[:, 1][0]
mm12(k, Φ) := e^(-1i*π*k)/cos(π*Φ)*(α/(4*1i*k) + sin(π*Φ)*sin(π*(k + Φ))/(1i*sin(π*k)))
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